// SBML level 2 version 4

model main()

  // Compartments:
  compartment cell = 1 volume;

  // Species:
  species $gene in cell = 0;
  species D in cell = 0;
  species $A in cell = 0;
  species $B in cell = 0;
  species C in cell = 0;
  species mD in cell = 0;
  species mC in cell = 0;

  // Reactions:
  Transcription_and_A_B__mC: $gene => mC; 8.6209*(A*B)^4/(4380.9713^4 + (A*B)^4);  // modifiers: A, B
  Degradation__mC: mC => $gene; 0.2458*mC;
  Translation_and_mC__C: $gene => C; 3.6835*mC;  // modifiers: mC
  Degradation__C: C => $gene; 0.7032*C;
  Transcription_not_C__mD: $gene => mD; 8.2182*35.1432^4/(35.1432^4 + C^4);  // modifiers: C
  Degradation__mD: mD => $gene; 0.0934*mD;
  Translation_not_mD__D: $gene => D; 4.6688*mD;  // modifiers: mD
  Degradation__D: D => $gene; 0.7069*D;
end
