// SBML level 2 version 4

model nand()

  // Compartments:
  compartment cell = 1 volume;

  // Species:
  substanceOnly species $g in cell = 3;
  species e in cell = 0;
  species a in cell = 400/cell;
  species b in cell = 400/cell;
  species c in cell = 0;
  species d in cell = 0;
  species mc in cell = 0;
  species md in cell = 0;

  // Reactions:
  transcription1: $g => mc; transcription1_k1*(a*b)^transcription1_n/(transcription1_km^transcription1_n + (a*b)^transcription1_n) - transcription1_d1*mc;  // modifiers: a, b
    transcription1_k1 = 4.5272 substance; transcription1_km = 238.9569 substance; transcription1_n = 3 substance; transcription1_d1 = 0.0235 substance;
  translation1: mc => c; translation1_k2*mc - translation1_d2*c;
    translation1_k2 = 4.1585 substance; translation1_d2 = 0.8338 substance;
  transcription2: $g => md; transcription2_k1*transcription2_km^transcription2_n/(transcription2_km^transcription2_n + c^transcription2_n) - apply();  // modifiers: c
    transcription2_k1 = 3.2155 substance; transcription2_km = 213.2011 substance; transcription2_n = 1 substance; transcription2_d1 = 0.0197 substance;
  translation2: md => d; translation2_k2*md - translation2_d2*d;
    translation2_k2 = 3.0938 substance; translation2_d2 = 0.8101 substance;

  // Unit definitions:
  unit substance = mole;
  unit time = second;
end
