// SBML level 2 version 4

model not()

  // Compartments:
  compartment cell = 1 volume;

  // Species:
  substanceOnly species $g in cell = 3;
  species e in cell = 0;
  species a in cell = 500/cell;
  species b in cell = 500/cell;
  species mb in cell = 0;

  // Parameters:
  km = 224.0227 substance;
  k1 = 4.7313 substance;
  k2 = 4.6122 substance;
  n = 1 substance;
  d1 = 0.0205 substance;
  d2 = 0.8627 substance;

  // Reactions:
  transcription: $g => mb; k1*km^n/(km^n + a^n) - d1*mb;  // modifiers: a
  translation: mb => b; k2*mb - d2*b;

  // Unit definitions:
  unit substance = mole;
  unit time = second;
end
