// SBML level 2 version 4
// This example was taken from the slides of Bastiaan van den Berg, but fixed to proper SBML

model example()

  // Compartments:
  compartment cell = 1 volume;

  // Species:
  substanceOnly species $g in cell = 3; g is "gene";
  species p in cell = 0; p is "protein";
  species m in cell = 0; m is "mRNA";
  species r in cell = 0; r is "repressor";
  species e in cell = 0; e is "empty";

  // Reactions:
  transcription: $g => m; k1*Km^n/(Km^n + r^n);  // modifiers: r
    k1 = 5 substance; Km = 10 substance; n = 2 substance;

  // Unit definitions:
  unit substance = mole;
  unit time = second;
end
